// SBML level 2 version 4

function L_PFK(L, CiATP, KiATP, CAMP, KAMP, CF26BP, KF26BP, CF16BP, KF16BP, AT, AM, F16, F26)
  L*((1 + CiATP*(AT/KiATP))/(1 + AT/KiATP))^2*((1 + CAMP*(AM/KAMP))/(1 + AM/KAMP))^2*((1 + CF26BP*F26/KF26BP + CF16BP*F16/KF16BP)/(1 + F26/KF26BP + F16/KF16BP))^2;
end

function R_PFK(KmF6P, KmATP, g, AT, F6)
  1 + F6/KmF6P + AT/KmATP + g*(F6/KmF6P)*(AT/KmATP);
end

function T_PFK(CATP, KmATP, AT)
  1 + CATP*(AT/KmATP);
end

model Teusink2000_Glycolysis()

  // Compartments:
  compartment extracellular = 1;
  compartment cytosol in extracellular = 1;
  compartment mitochondrion = 1; mitochondrion is "mitochondrial matrix";

  // Species:
  species GLCi in cytosol = 0.087;
  species G6P in cytosol = 2.45;
  species F6P in cytosol = 0.62;
  species F16P in cytosol = 5.51;
  species TRIO in cytosol = 0.96;
  species BPG in cytosol = 0;
  species P3G in cytosol = 0.9;
  species P2G in cytosol = 0.12;
  species PEP in cytosol = 0.07;
  species PYR in cytosol = 1.85;
  species ACE in cytosol = 0.17;
  species P in cytosol = 6.31;
  species NAD in cytosol = 1.2;
  species NADH in cytosol = 0.39;
  species $Glyc in cytosol = 0;
  species $Trh in cytosol = 0;
  species $CO2 in cytosol = 1;
  species $SUCC in cytosol = 0;
  species $GLCo in extracellular = 50;
  species $ETOH in cytosol = 50;
  species $GLY in cytosol = 0.15;
  species ATP in cytosol = 1.5;
  species ADP in cytosol = 2.1;
  species AMP in cytosol = 0.5;
  species SUM_P in cytosol;
  species $F26BP in cytosol = 0.02;
  species $H in mitochondrion = 1;
  species $He in cytosol = 1;
  species AcCoA in mitochondrion = 0.063;
  species KG in mitochondrion = 0.225;
  species Cit in mitochondrion = 0.44;
  species OAA in mitochondrion = 0.005;
  species $O2 in mitochondrion = 1;
  species iP in mitochondrion = 2.44;
  species Pyr in mitochondrion = 0.154;
  species $H2O in mitochondrion = 1;

  // Parameters:
  gR = 5.12 dimensionless;
  KmPFKF6P = 0.1 mM;
  KmPFKATP = 0.71 mM;
  Lzero = 0.66 dimensionless;
  CiPFKATP = 100 dimensionless;
  KiPFKATP = 0.65 mM;
  CPFKAMP = 0.0845 dimensionless;
  KPFKAMP = 0.0995 mM;
  CPFKF26BP = 0.0174 dimensionless;
  KPFKF26BP = 0.000682 mM;
  CPFKF16BP = 0.397 dimensionless;
  KPFKF16BP = 0.111 mM;
  CPFKATP = 3 dimensionless;
  KeqAK = 0.45 dimensionless;
  KeqTPI = 0.045 dimensionless;
  toggle_vAK = 1;
  ATPcrit = 0 mM;
  At = 4.16 mM;
  C = 6.75e-6 mM_per_mV;
  DeltaGtransport = 0 mJ_per_mol;
  DeltaPsi = 0 mV;
  DeltaPsim = 150 mV;
  F = 96485 C_per_mol;
  JANT = 0 mM_per_s;
  JATP = 0 mM_per_s;
  Jleak = 0 mM_per_s;
  Jresp = 0 mM_per_s;
  K = 2 mM;
  Kapp = 4.4e-9 per_mM;
  Nt = 1.07 mM;
  R = 8314 mJ_per_mol_per_K;
  T = 298 kelvin;
  a = 0.1 per_mV;
  b = 0.004 per_mM;
  kANT = 0.05387 per_s;
  kATP = 131.9 mM_per_s;
  kleak = 0.000426 mM_per_s_per_mV;
  kresp = 2.5 mM_per_s;

  // Assignment rules:
  SUM_P := ATP + ADP + AMP;

  // Reactions:
  vGLK: GLCi + P -> G6P; cytosol*VmGLK/(KmGLKGLCi*KmGLKATP)*(GLCi*ATP - G6P*ADP/KeqGLK)/((1 + GLCi/KmGLKGLCi + G6P/KmGLKG6P)*(1 + ATP/KmGLKATP + ADP/KmGLKADP));  // modifiers: ATP, ADP
    VmGLK = 226.452 mMpermin; KmGLKGLCi = 0.08 mM; KmGLKATP = 0.15 mM; KeqGLK = 3800 dimensionless; KmGLKG6P = 30 mM; KmGLKADP = 0.23 mM;
  vPGI: G6P -> F6P; cytosol*VmPGI_2/KmPGIG6P_2*(G6P - F6P/KeqPGI_2)/(1 + G6P/KmPGIG6P_2 + F6P/KmPGIF6P_2);
    VmPGI_2 = 339.677 mMpermin; KmPGIG6P_2 = 1.4 mM; KeqPGI_2 = 0.314 dimensionless; KmPGIF6P_2 = 0.3 mM;
  vGLYCO: G6P + P => $Glyc; cytosol*KGLYCOGEN_3;
    KGLYCOGEN_3 = 6 mMpermin;
  vTreha: 2 G6P + P => $Trh; cytosol*KTREHALOSE;
    KTREHALOSE = 2.4 mMpermin;
  vPFK: F6P + P => F16P; cytosol*VmPFK*gR*(F6P/KmPFKF6P)*(ATP/KmPFKATP)*R_PFK(KmPFKF6P, KmPFKATP, gR, ATP, F6P)/(R_PFK(KmPFKF6P, KmPFKATP, gR, ATP, F6P)^2 + L_PFK(Lzero, CiPFKATP, KiPFKATP, CPFKAMP, KPFKAMP, CPFKF26BP, KPFKF26BP, CPFKF16BP, KPFKF16BP, ATP, AMP, F16P, F26BP)*T_PFK(CPFKATP, KmPFKATP, ATP)^2);  // modifiers: AMP, ATP, F26BP
    VmPFK = 182.903 mMpermin;
  vAK: 2 ADP -> ATP + AMP; toggle_vAK*(kf_AK*ADP^2 - kr_AK*ATP*AMP);
    kf_AK = 10 permin; kr_AK = 5 mMpermin;
  vATPsink: ATP => ADP + P; 0.5;
  vALD: F16P -> 2 TRIO; cytosol*VmALD/KmALDF16P*(F16P - KeqTPI/(1 + KeqTPI)*TRIO*(1/(1 + KeqTPI))*TRIO/KeqALD)/(1 + F16P/KmALDF16P + KeqTPI/(1 + KeqTPI)*TRIO/KmALDGAP + 1/(1 + KeqTPI)*TRIO/KmALDDHAP + KeqTPI/(1 + KeqTPI)*TRIO*(1/(1 + KeqTPI))*TRIO/(KmALDGAP*KmALDDHAP) + F16P*(KeqTPI/(1 + KeqTPI))*TRIO/(KmALDGAPi*KmALDF16P));
    VmALD = 322.258 mMpermin; KmALDF16P = 0.3 mM; KeqALD = 0.069 dimensionless; KmALDGAP = 2 mM; KmALDDHAP = 2.4 mM; KmALDGAPi = 10 mM;
  vGAPDH: TRIO + NAD -> BPG + NADH; cytosol*(VmGAPDHf*(KeqTPI/(1 + KeqTPI))*TRIO*NAD/(KmGAPDHGAP*KmGAPDHNAD) - VmGAPDHr*BPG*NADH/(KmGAPDHBPG*KmGAPDHNADH))/((1 + KeqTPI/(1 + KeqTPI)*TRIO/KmGAPDHGAP + BPG/KmGAPDHBPG)*(1 + NAD/KmGAPDHNAD + NADH/KmGAPDHNADH));
    VmGAPDHf = 1184.52 mMpermin; KmGAPDHGAP = 0.21 mM; KmGAPDHNAD = 0.09 mM; VmGAPDHr = 6549.8 mMpermin; KmGAPDHBPG = 0.0098 mM; KmGAPDHNADH = 0.06 mM;
  vPGK: BPG -> P3G + P; cytosol*VmPGK/(KmPGKP3G*KmPGKATP)*(KeqPGK*BPG*ADP - P3G*ATP)/((1 + BPG/KmPGKBPG + P3G/KmPGKP3G)*(1 + ATP/KmPGKATP + ADP/KmPGKADP));  // modifiers: ATP, ADP
    VmPGK = 1306.45 mMpermin; KmPGKP3G = 0.53 mM; KmPGKATP = 0.3 mM; KeqPGK = 3200 dimensionless; KmPGKBPG = 0.003 mM; KmPGKADP = 0.2 mM;
  vPGM: P3G -> P2G; cytosol*VmPGM/KmPGMP3G*(P3G - P2G/KeqPGM)/(1 + P3G/KmPGMP3G + P2G/KmPGMP2G);
    VmPGM = 2525.81 mMpermin; KmPGMP3G = 1.2 mM; KeqPGM = 0.19 dimensionless; KmPGMP2G = 0.08 mM;
  vENO: P2G -> PEP; cytosol*VmENO/KmENOP2G*(P2G - PEP/KeqENO)/(1 + P2G/KmENOP2G + PEP/KmENOPEP);
    VmENO = 365.806 mMpermin; KmENOP2G = 0.04 mM; KeqENO = 6.7 dimensionless; KmENOPEP = 0.5 mM;
  vPYK: PEP -> PYR + P; cytosol*VmPYK/(KmPYKPEP*KmPYKADP)*(PEP*ADP - PYR*ATP/KeqPYK)/((1 + PEP/KmPYKPEP + PYR/KmPYKPYR)*(1 + ATP/KmPYKATP + ADP/KmPYKADP));  // modifiers: ATP, ADP
    VmPYK = 1088.71 mMpermin; KmPYKPEP = 0.14 mM; KmPYKADP = 0.53 mM; KeqPYK = 6500 dimensionless; KmPYKPYR = 21 mM; KmPYKATP = 1.5 mM;
  vPDC: PYR => ACE + $CO2; cytosol*VmPDC*(PYR^nPDC/KmPDCPYR^nPDC)/(1 + PYR^nPDC/KmPDCPYR^nPDC);
    VmPDC = 174.194 mMpermin; nPDC = 1.9 dimensionless; KmPDCPYR = 4.33 mM;
  vSUC: 2 ACE + 3 NAD + 4 P => 3 NADH + $SUCC; cytosol*KSUCC*ACE;
    KSUCC = 21.4;
  vGLT: $GLCo -> GLCi; VmGLT/KmGLTGLCo*(GLCo - GLCi/KeqGLT)/(1 + GLCo/KmGLTGLCo + GLCi/KmGLTGLCi + 0.91*GLCo*GLCi/(KmGLTGLCo*KmGLTGLCi));
    VmGLT = 97.264 mmolepermin; KmGLTGLCo = 1.1918 mM; KeqGLT = 1 mM; KmGLTGLCi = 1.1918 mM;
  vADH: ACE + NADH -> NAD + $ETOH; -cytosol*(VmADH/(KiADHNAD*KmADHETOH)*(NAD*ETOH - NADH*ACE/KeqADH)/(1 + NAD/KiADHNAD + KmADHNAD*ETOH/(KiADHNAD*KmADHETOH) + KmADHNADH*ACE/(KiADHNADH*KmADHACE) + NADH/KiADHNADH + NAD*ETOH/(KiADHNAD*KmADHETOH) + KmADHNADH*NAD*ACE/(KiADHNAD*KiADHNADH*KmADHACE) + KmADHNAD*ETOH*NADH/(KiADHNAD*KmADHETOH*KiADHNADH) + NADH*ACE/(KiADHNADH*KmADHACE) + NAD*ETOH*ACE/(KiADHNAD*KmADHETOH*KiADHACE) + ETOH*NADH*ACE/(KiADHETOH*KiADHNADH*KmADHACE)));
    VmADH = 810 mMpermin; KiADHNAD = 0.92 mM; KmADHETOH = 17 mM; KeqADH = 6.9e-5 dimensionless; KmADHNAD = 0.17 mM; KmADHNADH = 0.11 mM; KiADHNADH = 0.031 mM; KmADHACE = 1.11 mM; KiADHACE = 1.1 mM; KiADHETOH = 90 mM;
  vG3PDH: TRIO + NADH => NAD + $GLY; cytosol*VmG3PDH/(KmG3PDHDHAP*KmG3PDHNADH)*(1/(1 + KeqTPI)*TRIO*NADH - GLY*NAD/KeqG3PDH)/((1 + 1/(1 + KeqTPI)*TRIO/KmG3PDHDHAP + GLY/KmG3PDHGLY)*(1 + NADH/KmG3PDHNADH + NAD/KmG3PDHNAD));
    VmG3PDH = 70.15 mMpermin; KmG3PDHDHAP = 0.4 mM; KmG3PDHNADH = 0.023 mM; KeqG3PDH = 4300 dimensionless; KmG3PDHGLY = 1 mM; KmG3PDHNAD = 0.93 mM;
  vATP: P -> ; cytosol*KATPASE*ATP;  // modifiers: ATP
    KATPASE = 33.7 permin;
  v1: => Pyr; mitochondrion*k1;
    k1 = 0.038 mM_per_s;
  v2: Pyr + NAD => AcCoA + NADH; mitochondrion*k2*Pyr*NAD;
    k2 = 0.152 per_mM_per_s;
  v3: OAA + AcCoA => Cit; mitochondrion*k3*OAA*AcCoA;
    k3 = 57.142 per_mM_per_s;
  v4: Cit + NAD => KG + NADH; mitochondrion*k4*Cit*NAD;
    k4 = 0.053 per_mM_per_s;
  v5: KG + ADP + 2 NAD => OAA + ATP + 2 NADH; mitochondrion*k5*KG*NAD*(At - ATP);
    k5 = 0.082361 per_mM_squared_per_s;
  v6: OAA -> KG; mitochondrion*k6*(OAA - KG/Keq);
    k6 = 0.0032 per_s; Keq = 0.3975 dimensionless;
  v7: Pyr + ATP => OAA + ADP; mitochondrion*k7*Pyr*ATP;
    k7 = 0.04 per_mM_per_s;
  v8: OAA => ; mitochondrion*k8*OAA;
    k8 = 3.6 per_s;
  vresp: NADH + 0.5 $O2 + 11 $H => NAD + $H2O + 10 $He; mitochondrion*Jresp;
  vANT: ATP => ADP; mitochondrion*JANT;
  vleak: $He => $H; mitochondrion*Jleak;
  vPiH_symport: P + $He -> iP + $H; VmPiSym*(P*He - iP*H/KeqPiH)/((KmP + P)*(KmH + He));
    VmPiSym = 10 mM_per_min; KmP = 1 mM; KmH = 1 mM; KeqPiH = 10 dimensionless;

  // Unit definitions:
  unit substance = 1e-3 mole; substance is "millimole";
  unit time = 60 second; time is "minute";
  unit mM = 1e-3 mole / litre;
  unit mMpermin = 1e-3 mole / (litre * 60 second);
  unit permin = 1 / (60 second);
  unit mmolepermin = 1e-3 mole / (60 second);
end
