// SBML level 2 version 4

model TCA_Cycle()

  // Compartments:
  compartment mitochondrion = 1; mitochondrion is "Mitochondrial Matrix";

  // Species:
  species PYR_m in mitochondrion = 0.1; PYR_m is "Pyruvate";
  species AcCoA_m in mitochondrion = 0.05; AcCoA_m is "Acetyl-CoA";
  species OAA_m in mitochondrion = 0.01; OAA_m is "Oxaloacetate";
  species Cit_m in mitochondrion = 0.5; Cit_m is "Citrate";
  species IsoCit_m in mitochondrion = 0.05; IsoCit_m is "Isocitrate";
  species aKG_m in mitochondrion = 0.1; aKG_m is "Alpha-Ketoglutarate";
  species SuccCoA_m in mitochondrion = 0.01; SuccCoA_m is "Succinyl-CoA";
  species Succ_m in mitochondrion = 0.1; Succ_m is "Succinate";
  species Fum_m in mitochondrion = 0.05; Fum_m is "Fumarate";
  species Mal_m in mitochondrion = 0.1; Mal_m is "Malate";
  species CoA_m in mitochondrion = 0.5; CoA_m is "Coenzyme A";
  species FAD_m in mitochondrion = 0.5; FAD_m is "Flavin Adenine Dinucleotide (oxidized)";
  species FADH2_m in mitochondrion = 0.05; FADH2_m is "Flavin Adenine Dinucleotide (reduced)";
  species $CO2_m in mitochondrion = 1; CO2_m is "Carbon Dioxide";
  species iP_m in mitochondrion = 2.44; iP_m is "Inorganic Phosphate";

  // Reactions:
  vPYR_trans: PYR -> PYR_m; kPYR_trans*(PYR - PYR_m); vPYR_trans is "Pyruvate Transport";
    kPYR_trans = 10 per_min;
  vPDH: PYR_m + CoA_m + NAD_m => AcCoA_m + $CO2_m + NADH_m; VmPDH*PYR_m*CoA_m*NAD_m/((KmPDH_PYR + PYR_m)*(KmPDH_CoA + CoA_m)*(KmPDH_NAD + NAD_m)); vPDH is "Pyruvate Dehydrogenase";
    VmPDH = 100 mM_per_min; KmPDH_PYR = 0.1 mM; KmPDH_CoA = 0.01 mM; KmPDH_NAD = 0.1 mM;
  vCS: AcCoA_m + OAA_m => Cit_m + CoA_m; VmCS*AcCoA_m*OAA_m/((KmCS_AcCoA + AcCoA_m)*(KmCS_OAA + OAA_m)); vCS is "Citrate Synthase";
    VmCS = 50 mM_per_min; KmCS_AcCoA = 0.01 mM; KmCS_OAA = 0.005 mM;
  vAcon: Cit_m -> IsoCit_m; kAcon_f*(Cit_m - IsoCit_m/KeqAcon); vAcon is "Aconitase";
    kAcon_f = 100 per_min; KeqAcon = 1 dimensionless;
  vIDH: IsoCit_m + NAD_m => aKG_m + $CO2_m + NADH_m; VmIDH*IsoCit_m*NAD_m/((KmIDH_IsoCit + IsoCit_m)*(KmIDH_NAD + NAD_m)); vIDH is "Isocitrate Dehydrogenase";
    VmIDH = 50 mM_per_min; KmIDH_IsoCit = 0.1 mM; KmIDH_NAD = 0.1 mM;
  vAKGDH: aKG_m + CoA_m + NAD_m => SuccCoA_m + $CO2_m + NADH_m; VmAKGDH*aKG_m*CoA_m*NAD_m/((KmAKGDH_aKG + aKG_m)*(KmAKGDH_CoA + CoA_m)*(KmAKGDH_NAD + NAD_m)); vAKGDH is "Alpha-Ketoglutarate Dehydrogenase";
    VmAKGDH = 50 mM_per_min; KmAKGDH_aKG = 0.1 mM; KmAKGDH_CoA = 0.01 mM; KmAKGDH_NAD = 0.1 mM;
  vSCS: SuccCoA_m + ADP_m + iP_m => Succ_m + ATP_m + CoA_m; VmSCS*SuccCoA_m*ADP_m*iP_m/((KmSCS_SuccCoA + SuccCoA_m)*(KmSCS_ADP + ADP_m)*(KmSCS_iP + iP_m)); vSCS is "Succinyl-CoA Synthetase";
    VmSCS = 50 mM_per_min; KmSCS_SuccCoA = 0.01 mM; KmSCS_ADP = 0.1 mM; KmSCS_iP = 1 mM;
  vSDH: Succ_m + FAD_m => Fum_m + FADH2_m; VmSDH*Succ_m*FAD_m/((KmSDH_Succ + Succ_m)*(KmSDH_FAD + FAD_m)); vSDH is "Succinate Dehydrogenase";
    VmSDH = 50 mM_per_min; KmSDH_Succ = 0.5 mM; KmSDH_FAD = 0.01 mM;
  vFUM: Fum_m -> Mal_m; kFUM_f*(Fum_m - Mal_m/KeqFUM); vFUM is "Fumarase";
    kFUM_f = 100 per_min; KeqFUM = 4 dimensionless;
  vMDH: Mal_m + NAD_m -> OAA_m + NADH_m; kMDH_f*Mal_m*NAD_m - kMDH_r*OAA_m*NADH_m; vMDH is "Malate Dehydrogenase";
    kMDH_f = 100 per_mM_per_min; kMDH_r = 10 per_mM_per_min;
  vETC_FADH2: FADH2_m + 0.5 O2 + 3 H => FAD_m + H2O + 6 He; kETC_FADH2*FADH2_m; vETC_FADH2 is "FADH2 Oxidation";
    kETC_FADH2 = 60 per_min;
end
